OpenVSP model (file version 5), 3 components.
Geometry view with OpenVSP parameter names; values to 6 digits, angles in degrees, lengths in the model's unit.
Overall bounding box: X_Min=-0.000364263 X_Len=11.5494 Y_Min=-9 Y_Len=18 Z_Min=-0.169809 Z_Len=2.7459

Wing "Wing"
  location (X Y Z) 0 0 0, rotation 0 0 0
  symmetric about XZ
  bounding box size 6.19652 18 0.4867
  totals: TotalSpan=18 TotalProjectedSpan=18 TotalChord=2.5 TotalArea=45 TotalAR=7.2
  root: chord 4, twist 0, NACA 4-series Camber=0.02 CamberLoc=0.4 ThickChord=0.12
  sections:
    n  Span  Root_Chord  Tip_Chord  Area  Sweep  Sweep_Location  Dihedral  Twist  Twist_Location  tip airfoil
    1  9     4           1          22.5  30     0               0         0      0.25            as above

Wing "Horizontal_Tail"
  location (X Y Z) 10 0 0, rotation 0 0 0
  symmetric about XZ
  bounding box size 1.54904 4.5 0.100058
  totals: TotalSpan=4.5 TotalProjectedSpan=4.5 TotalChord=0.625 TotalArea=2.8125 TotalAR=7.2
  root: chord 1, twist 0, NACA 4-series Camber=0 CamberLoc=0.2 ThickChord=0.1
  sections:
    n  Span  Root_Chord  Tip_Chord  Area     Sweep  Sweep_Location  Dihedral  Twist  Twist_Location  tip airfoil
    1  2.25  1           0.25       1.40625  30     0               0         0      0.25            as above

Wing "Vertical_Tail"
  location (X Y Z) 10 0 0.326087, rotation 90 0 0
  bounding box size 1.54904 0.100058 2.25
  totals: TotalSpan=2.25 TotalProjectedSpan=2.25 TotalChord=0.625 TotalArea=1.40625 TotalAR=3.6
  root: chord 1, twist 0, NACA 4-series Camber=0 CamberLoc=0.2 ThickChord=0.1
  sections:
    n  Span  Root_Chord  Tip_Chord  Area     Sweep  Sweep_Location  Dihedral  Twist  Twist_Location  tip airfoil
    1  2.25  1           0.25       1.40625  30     0               0         0      0.25            as above
